n := 10
i := 0 .. 2*n
VX[i] := 2*π*i/(2*n + 1)
scale := 100
j := 0 .. scale
scale1 := 15
x[j] := min(VX) + j*(max(VX) - min(VX))/scale
VY[i] := 1, 1.05, 90.6, 520.4, 1714.7, 2915, 2439.2, 1020.6, 230.7, 32.17, 3.29, 0.3, 0.03, 0.004, 0.001, 0.0003, 0.0006, 0.002, 0.01, 0.09, 0.9
VX[i] = [0; 0.299199; 0.598399; 0.897598; 1.1968; 1.496; 1.7952; 2.0944; 2.39359; 2.69279; 2.99199; 3.29119; 3.59039; 3.88959; 4.18879; 4.48799; 4.78719; 5.08639; 5.38559; 5.68479; 5.98399]
j1 := 0 .. scale1
# Сплайн интерполяции (S - куб, P - пабаб, L - лин)
x1[j1] := min(VX) + j1*(max(VX) - min(VX))/scale1
S := cspline(VX, VY)
P := pspline(VX, VY)
scale2 := 50
L := lspline(VX, VY)
j2 := 0 .. scale2
# Тригонометрическая интерполяция
x2[j2] := min(VX) + j2*(max(VX) - min(VX))/scale2
k := 1 .. n
scale3 := 100
a0 := 1/(2*n + 1)*sum(VY[i], i = 0 .. 2*n)
j3 := 0 .. scale3
x3[j3] := min(VX) + j3*(max(VX) - min(VX))/scale3
a(k) := 1/(2*n + 1)*sum(VY[i]*cos((2*k*π*i)/(2*n + 1)), i)
b(k) := 1/(2*n + 1)*sum(VY[i]*sin((2*k*π*i)/(2*n + 1)), i)
P1(x) := a0 + 2*sum(a(k)*cos(k*x) + b(k)*sin(k*x), k)
lint(x) := linterp(VX, VY, x)
# Интерполяция в узле
intS(x) := interp(S, VX, VY, x)
intS(0.299199) = 1.04998
intP(x) := interp(P, VX, VY, x)
intP(0.299199) = 1.04997
intL(x) := interp(L, VX, VY, x)
intL(0.299199) = 1.04998
# Интерполяция между узлами
P1(0.299199) = 1.04998
intS(1) = 849.708  # Интерполяция вне диапазона
intS(7) = 20.0067
intP(1) = 849.817
intP(7) = 10.3806
intL(1) = 849.762
intL(7) = -3.16403
P1(1) = 835.846
P1(7) = 195.378
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