n := 10
i := 0 .. 2*n
VX[i] := 2*π*i/(2*n + 1)
scale := 100
j := 0 .. scale
x[j] := min(VX) + j*(max(VX) - min(VX))/scale
VY[i] := 1, 1.05, 90.6, 520.4, 1714.7, 2915, 2439.2, 1020.6, 230.7, 32.17, 3.29, 0.3, 0.03, 0.004, 0.001, 0.0003, 0.0006, 0.002, 0.01, 0.09, 0.9
VX[i] = [0; 0.299199; 0.598399; 0.897598; 1.1968; 1.496; 1.7952; 2.0944; 2.39359; 2.69279; 2.99199; 3.29119; 3.59039; 3.88959; 4.18879; 4.48799; 4.78719; 5.08639; 5.38559; 5.68479; 5.98399]
# Сплайн интерполяции (S - куб, P - пабаб, L - лин)
S := cspline(VX, VY)
P := pspline(VX, VY)
L := lspline(VX, VY)
# Тригонометрическая интерполяция
k := 1 .. n
a0 := 1/(2*n + 1)*sum(VY[i], i = 0 .. 2*n)
a(k) := 1/(2*n + 1)*sum(VY[i]*cos((2*k*π*i)/(2*n + 1)), i)
b(k) := 1/(2*n + 1)*sum(VY[i]*sin((2*k*π*i)/(2*n + 1)), i)
P1(x) := a0 + 2*sum(a(k)*cos(k*x) + b(k)*sin(k*x), k)
i := 0 .. n
vy[i] := 1, 90.6, 1714.7, 2439.2, 230.7, 3.29, 0.03, 0.001, 0.0006, 0.01, 0.9
k := 1 .. n
scale := 100
j := 0 .. scale
vx := [0; 0.598399; 1.196797; 1.795196; 2.393594; 2.991993; 3.590392; 4.18879; 4.787189; 5.385587; 5.983986]
x[j] := min(vx) + j*(max(vx) - min(vx))/scale
S1 := cspline(vx, vy)
P11 := pspline(vx, vy)
L1 := lspline(vx, vy)
a0 := 1/(2*n + 1)*sum(vy[i], i = 0 .. n)
a(k) := 1/(2*n + 1)*sum(vy[i]*cos((2*k*π*i)/(2*n + 1)), i)
b(k) := 1/(2*n + 1)*sum(vy[i]*sin((2*k*π*i)/(2*n + 1)), i)
P2(x) := a0 + 2*sum(a(k)*cos(k*x/2) + b(k)*sin(k*x/2), k)
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