n := 10
i := 0 .. 2*n
VX[i] := 2*π*i/(2*n + 1)
VX[i] = [0; 0.299199; 0.598399; 0.897598; 1.1968; 1.496; 1.7952; 2.0944; 2.39359; 2.69279; 2.99199; 3.29119; 3.59039; 3.88959; 4.18879; 4.48799; 4.78719; 5.08639; 5.38559; 5.68479; 5.98399]
VY[i] := 1, 1.05, 90.6, 520.4, 1714.7, 2915, 2439.2, 1020.6, 230.7, 32.17, 3.29, 0.3, 0.03, 0.004, 0.001, 0.0003, 0.0006, 0.002, 0.01, 0.09, 0.9
S := cspline(VX, VY)
P := pspline(VX, VY)
L := lspline(VX, VY)
k := 1 .. n
a0 := 1/(2*n + 1)*sum(VY[i], i = 0 .. 2*n)
a(k) := 1/(2*n + 1)*sum(VY[i]*cos((2*k*π*i)/(2*n + 1)), i)
b(k) := 1/(2*n + 1)*sum(VY[i]*sin((2*k*π*i)/(2*n + 1)), i)
nodeT(x) := a0 + 2*sum(a(k)*cos(k*x) + b(k)*sin(k*x), k)
scale := 100
j := 0 .. scale
Z[j] := min(VX) + j*(max(VX) - min(VX))/scale
nodeS(Z) := interp(S, VX, VY, Z)
nodeP(Z) := interp(P, VX, VY, Z)
nodeL(Z) := interp(L, VX, VY, Z)
nodeS(0.299199) = 1.04998
nodeS(1) = 849.708
nodeS(7) = 20.0067  # S
520.4 - 849.708 = -329.308
nodeP(0.299199) = 1.04997
nodeP(1) = 849.817
nodeP(7) = 10.3806  # P
520.4 - 849.817 = -329.417
nodeL(0.299199) = 1.04998
nodeL(1) = 849.762
nodeL(7) = -3.16403  # L
520.4 - 849.762 = -329.362
nodeT(0.299199) = 1.04998
nodeT(1) = 835.846
nodeT(7) = 195.378  # T
520.4 - 835.846 = -315.446
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